<neuroml xmlns="http://www.neuroml.org/schema/neuroml2"  xmlns:xs="http://www.w3.org/2001/XMLSchema" xmlns:xsi="http://www.w3.org/2001/XMLSchema-instance" xsi:schemaLocation="http://www.neuroml.org/schema/neuroml2 https://raw.github.com/NeuroML/NeuroML2/development/Schemas/NeuroML2/NeuroML_v2.3.1.xsd" id="Worm2D">
    <include href="cell_syn_X.xml"/>
    <expOneSynapse id="syn0" gbase="65nS" erev="0mV" tauDecay="3ms"/>
    <network id="Worm2DNet">
        <population id="DA" component="GenericNeuronCellX" size="10"/>
        <population id="DB" component="GenericNeuronCellX" size="10"/>
        <population id="DD" component="GenericNeuronCellX" size="10"/>
        <population id="VD" component="GenericNeuronCellX" size="10"/>
        <population id="VA" component="GenericNeuronCellX" size="10"/>
        <population id="VB" component="GenericNeuronCellX" size="10"/>
        <electricalProjection id="NC_DB_DB_gapJunction0" presynapticPopulation="DB" postsynapticPopulation="DB">
            <electricalConnectionInstanceW id="0" preCell="../DB[7]" postCell="../DB[1]" synapse="gapJunction0" weight="0.111893748558795"/>
            <electricalConnectionInstanceW id="4" preCell="../DB[1]" postCell="../DB[7]" synapse="gapJunction0" weight="0.111893748558795"/>
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        </electricalProjection>
        <electricalProjection id="NC_DD_DD_gapJunction0" presynapticPopulation="DD" postsynapticPopulation="DD">
            <electricalConnectionInstanceW id="1" preCell="../DD[8]" postCell="../DD[2]" synapse="gapJunction0" weight="1.626882458649384"/>
            <electricalConnectionInstanceW id="6" preCell="../DD[2]" postCell="../DD[8]" synapse="gapJunction0" weight="1.626882458649384"/>
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        </electricalProjection>
        <electricalProjection id="NC_VD_VD_gapJunction0" presynapticPopulation="VD" postsynapticPopulation="VD">
            <electricalConnectionInstanceW id="2" preCell="../VD[9]" postCell="../VD[3]" synapse="gapJunction0" weight="1.626882458649384"/>
            <electricalConnectionInstanceW id="8" preCell="../VD[3]" postCell="../VD[9]" synapse="gapJunction0" weight="1.626882458649384"/>
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        </electricalProjection>
        <electricalProjection id="NC_VB_VB_gapJunction0" presynapticPopulation="VB" postsynapticPopulation="VB">
            <electricalConnectionInstanceW id="3" preCell="../VB[11]" postCell="../VB[5]" synapse="gapJunction0" weight="0.111893748558795"/>
            <electricalConnectionInstanceW id="10" preCell="../VB[5]" postCell="../VB[11]" synapse="gapJunction0" weight="0.111893748558795"/>
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        </electricalProjection>
        <continuousProjection id="NC_DA_DA_silentSyn" presynapticPopulation="DA" postsynapticPopulation="DA">
            <continuousConnectionInstanceW id="0" preCell="../DA[0]" postCell="../DA[0]" preComponent="silentSyn" postComponent="neuron_to_neuron_syn_x" weight="-2.528311446261591"/>
            <continuousConnectionInstanceW id="14" preCell="../DA[6]" postCell="../DA[6]" preComponent="silentSyn" postComponent="neuron_to_neuron_syn_x" weight="-2.528311446261591"/>
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        </continuousProjection>
        <continuousProjection id="NC_DD_DA_silentSyn" presynapticPopulation="DD" postsynapticPopulation="DA">
            <continuousConnectionInstanceW id="1" preCell="../DD[2]" postCell="../DA[0]" preComponent="silentSyn" postComponent="neuron_to_neuron_syn_x" weight="-14.672044016483778"/>
            <continuousConnectionInstanceW id="15" preCell="../DD[8]" postCell="../DA[6]" preComponent="silentSyn" postComponent="neuron_to_neuron_syn_x" weight="-14.672044016483778"/>
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        </continuousProjection>
        <continuousProjection id="NC_DB_DB_silentSyn" presynapticPopulation="DB" postsynapticPopulation="DB">
            <continuousConnectionInstanceW id="2" preCell="../DB[1]" postCell="../DB[1]" preComponent="silentSyn" postComponent="neuron_to_neuron_syn_x" weight="-5.431573678563159"/>
            <continuousConnectionInstanceW id="16" preCell="../DB[7]" postCell="../DB[7]" preComponent="silentSyn" postComponent="neuron_to_neuron_syn_x" weight="-5.431573678563159"/>
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        </continuousProjection>
        <continuousProjection id="NC_DD_DB_silentSyn" presynapticPopulation="DD" postsynapticPopulation="DB">
            <continuousConnectionInstanceW id="3" preCell="../DD[2]" postCell="../DB[1]" preComponent="silentSyn" postComponent="neuron_to_neuron_syn_x" weight="-1.110075444163887"/>
            <continuousConnectionInstanceW id="17" preCell="../DD[8]" postCell="../DB[7]" preComponent="silentSyn" postComponent="neuron_to_neuron_syn_x" weight="-1.110075444163887"/>
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        </continuousProjection>
        <continuousProjection id="NC_DD_DD_silentSyn" presynapticPopulation="DD" postsynapticPopulation="DD">
            <continuousConnectionInstanceW id="4" preCell="../DD[2]" postCell="../DD[2]" preComponent="silentSyn" postComponent="neuron_to_neuron_syn_x" weight="0.43417780432587"/>
            <continuousConnectionInstanceW id="18" preCell="../DD[8]" postCell="../DD[8]" preComponent="silentSyn" postComponent="neuron_to_neuron_syn_x" weight="0.43417780432587"/>
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        </continuousProjection>
        <continuousProjection id="NC_VA_DD_silentSyn" presynapticPopulation="VA" postsynapticPopulation="DD">
            <continuousConnectionInstanceW id="5" preCell="../VA[4]" postCell="../DD[2]" preComponent="silentSyn" postComponent="neuron_to_neuron_syn_x" weight="1.688431247680192"/>
            <continuousConnectionInstanceW id="19" preCell="../VA[10]" postCell="../DD[8]" preComponent="silentSyn" postComponent="neuron_to_neuron_syn_x" weight="1.688431247680192"/>
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        </continuousProjection>
        <continuousProjection id="NC_VB_DD_silentSyn" presynapticPopulation="VB" postsynapticPopulation="DD">
            <continuousConnectionInstanceW id="6" preCell="../VB[5]" postCell="../DD[2]" preComponent="silentSyn" postComponent="neuron_to_neuron_syn_x" weight="5.038926703654519"/>
            <continuousConnectionInstanceW id="20" preCell="../VB[11]" postCell="../DD[8]" preComponent="silentSyn" postComponent="neuron_to_neuron_syn_x" weight="5.038926703654519"/>
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        </continuousProjection>
        <continuousProjection id="NC_VD_VD_silentSyn" presynapticPopulation="VD" postsynapticPopulation="VD">
            <continuousConnectionInstanceW id="7" preCell="../VD[3]" postCell="../VD[3]" preComponent="silentSyn" postComponent="neuron_to_neuron_syn_x" weight="0.43417780432587"/>
            <continuousConnectionInstanceW id="21" preCell="../VD[9]" postCell="../VD[9]" preComponent="silentSyn" postComponent="neuron_to_neuron_syn_x" weight="0.43417780432587"/>
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        </continuousProjection>
        <continuousProjection id="NC_DA_VD_silentSyn" presynapticPopulation="DA" postsynapticPopulation="VD">
            <continuousConnectionInstanceW id="8" preCell="../DA[0]" postCell="../VD[3]" preComponent="silentSyn" postComponent="neuron_to_neuron_syn_x" weight="1.688431247680192"/>
            <continuousConnectionInstanceW id="22" preCell="../DA[6]" postCell="../VD[9]" preComponent="silentSyn" postComponent="neuron_to_neuron_syn_x" weight="1.688431247680192"/>
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        </continuousProjection>
        <continuousProjection id="NC_DB_VD_silentSyn" presynapticPopulation="DB" postsynapticPopulation="VD">
            <continuousConnectionInstanceW id="9" preCell="../DB[1]" postCell="../VD[3]" preComponent="silentSyn" postComponent="neuron_to_neuron_syn_x" weight="5.038926703654519"/>
            <continuousConnectionInstanceW id="23" preCell="../DB[7]" postCell="../VD[9]" preComponent="silentSyn" postComponent="neuron_to_neuron_syn_x" weight="5.038926703654519"/>
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        </continuousProjection>
        <continuousProjection id="NC_VA_VA_silentSyn" presynapticPopulation="VA" postsynapticPopulation="VA">
            <continuousConnectionInstanceW id="10" preCell="../VA[4]" postCell="../VA[4]" preComponent="silentSyn" postComponent="neuron_to_neuron_syn_x" weight="-2.528311446261591"/>
            <continuousConnectionInstanceW id="24" preCell="../VA[10]" postCell="../VA[10]" preComponent="silentSyn" postComponent="neuron_to_neuron_syn_x" weight="-2.528311446261591"/>
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        </continuousProjection>
        <continuousProjection id="NC_VD_VA_silentSyn" presynapticPopulation="VD" postsynapticPopulation="VA">
            <continuousConnectionInstanceW id="11" preCell="../VD[3]" postCell="../VA[4]" preComponent="silentSyn" postComponent="neuron_to_neuron_syn_x" weight="-14.672044016483778"/>
            <continuousConnectionInstanceW id="25" preCell="../VD[9]" postCell="../VA[10]" preComponent="silentSyn" postComponent="neuron_to_neuron_syn_x" weight="-14.672044016483778"/>
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        </continuousProjection>
        <continuousProjection id="NC_VB_VB_silentSyn" presynapticPopulation="VB" postsynapticPopulation="VB">
            <continuousConnectionInstanceW id="12" preCell="../VB[5]" postCell="../VB[5]" preComponent="silentSyn" postComponent="neuron_to_neuron_syn_x" weight="-5.431573678563159"/>
            <continuousConnectionInstanceW id="26" preCell="../VB[11]" postCell="../VB[11]" preComponent="silentSyn" postComponent="neuron_to_neuron_syn_x" weight="-5.431573678563159"/>
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        </continuousProjection>
        <continuousProjection id="NC_VD_VB_silentSyn" presynapticPopulation="VD" postsynapticPopulation="VB">
            <continuousConnectionInstanceW id="13" preCell="../VD[3]" postCell="../VB[5]" preComponent="silentSyn" postComponent="neuron_to_neuron_syn_x" weight="-1.110075444163887"/>
            <continuousConnectionInstanceW id="27" preCell="../VD[9]" postCell="../VB[11]" preComponent="silentSyn" postComponent="neuron_to_neuron_syn_x" weight="-1.110075444163887"/>
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        </continuousProjection>
    </network>
</neuroml>
